*Heading
** Job name:  Model name:
** Generated by: Bonemat
*Preprint, echo=NO, model=NO, history=NO, contact=NO
**
*Node
	  4613,	   9.1318016052246E+01,	   1.6341191101074E+02,	  -3.7706745147705E+01
	  4808,	   9.3473068237305E+01,	   1.5769909667969E+02,	  -3.8054424285889E+01
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*Element, type=C3D10
	37411, 	119324,	  6996,	  6994,	  4809,	 70910,	 70925,	 70920,	 84679,	 84682,	 84683
	39600, 	119324,	  6997,	  6994,	  6996,	 70906,	 70924,	 70920,	 70910,	 70913,	 70925
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*Elset, elset=Set_1
37411, 39600, 45136, 55228, 59661, 59812, 64262
*Solid Section, elset=Set_1, material=Mat_3
*Elset, elset=Set_2
60717, 74155, 73973, 76884, 77076
*Solid Section, elset=Set_2, material=Mat_2
*Elset, elset=Set_3
71673, 76382
*Solid Section, elset=Set_3, material=Mat_4
*Elset, elset=Set_4
61839, 62740, 64721
*Solid Section, elset=Set_4, material=Mat_1
**
*Material, name=Mat_1
*Density
 1e-12,
*Elastic
3644.16992200, 0.30000000
*Material, name=Mat_2
*Density
 1.,
*Elastic
3191.51001000, 0.30000000
*Material, name=Mat_3
*Density
 2.,
*Elastic
2289.17993200, 0.30000000
*Material, name=Mat_4
*Elastic
1236.48999000, 0.30000000
